// SBML level 3 version 2

model PBK_PFAS()
  // model units - substance: MicroGM, time: DAY, volume: L

  // Compartments:
  compartment Lung; Lung has L; Lung is "lung";
  compartment Skin; Skin has L; Skin is "skin";
  compartment Ven_Plas; Ven_Plas has L; Ven_Plas is "venous blood";
  compartment Art_Plas; Art_Plas has L; Art_Plas is "arterial blood";
  compartment Gut; Gut has L; Gut is "gut";
  compartment Liv; Liv has L; Liv is "liver";
  compartment Fat; Fat has L; Fat is "adipose tissue";
  compartment Kid; Kid has L; Kid is "kidney";
  compartment Fil; Fil has L; Fil is "filtrate";
  compartment Delay = 1 L; Delay is "storage compartment of urine";
  compartment Urine = 1 L; Urine is "urine";
  compartment Rest; Rest has L; Rest is "rest-of-body";

  // Species:
  substanceOnly species Alung in Lung = 0; Alung is "quantity in lung";
  substanceOnly species ASk in Skin = 0; ASk is "quantity in skin";
  substanceOnly species AVen_Plas in Ven_Plas = 0; AVen_Plas is "quantity in venous blood plasma";
  substanceOnly species AArt_Plas in Art_Plas = 0; AArt_Plas is "quantity in arterial blood plasma";
  substanceOnly species AG in Gut = 0; AG is "quantity in gut";
  substanceOnly species AL in Liv = 0; AL is "quantity in liver";
  substanceOnly species AF in Fat = 0; AF is "quantity in fat";
  substanceOnly species AK in Kid = 0; AK is "quantity in kidney";
  substanceOnly species Afil in Fil = 0; Afil is "quantity in filtrate";
  substanceOnly species Adelay in Delay = 0; Adelay is "quantity in delay";
  substanceOnly species Aurine in Urine = 0; Aurine is "quantity in urine";
  substanceOnly species AR in Rest = 0; AR is "quantity in rest-of-body";

  // Parameters:
  BW = 70 KiloGM; BW is "body weight";
  QCC = 300 L_PER_DAY_KiloGM3DIV4; QCC is "cardiac blood output";
  QFC = 0.052 UNITLESS; QFC is "fraction cardiac output going to fat";
  QLC = 0.069 UNITLESS; QLC is "fraction cardiac output going to liver";
  QKC = 0.175 UNITLESS; QKC is "fraction cardiac output going to kidney";
  QSkC = 0.058 UNITLESS; QSkC is "fraction cardiac output going to skin";
  QGC = 0.181 UNITLESS; QGC is "fraction of cardiac output going to gut and the liver via portal arthery";
  VLC = 0.026 UNITLESS; VLC is "fraction liver volume";
  VFC = 0.214 UNITLESS; VFC is "fraction fat volume";
  VKC = 0.004 UNITLESS; VKC is "fraction kidney volume";
  VfilC = 0.0004 UNITLESS; VfilC is "fraction filtrate compartment volume";
  VGC = 0.0171 UNITLESS; VGC is "fraction gut volume";
  VlunC = 0.007 UNITLESS; VlunC is "fraction lung volume";
  VPlasC = 0.0428 UNITLESS; VPlasC is "fraction plasma volume";
  VartC = 0.39;
  Htc = 0.44 UNITLESS; Htc is "hematocrit";
  Skinthickness = 0.1 CentiM; Skinthickness is "skin thickness";
  Skinarea = 972 CentiM2; Skinarea is "exposed area on skin";
  MW = 414.07 GM_PER_MOL; MW is "molar weight";
  logP = 4.81 UNITLESS;
  VP = 2.34; VP is "vapor pressure";
  Tmc = 144000; Tmc is "maximum resorption rate";
  Kt = 55; Kt is "resorption affinity";
  kurinec = 0.0072; kurinec is "urinary elimination rate constant";
  Free = 0.02; Free is "free fraction in plasma";
  Biotransformation = 0.003; Biotransformation is "ratio of biotransformation";
  PL = 2.2 UNITLESS; PL is "partition coefficient liver/plasma";
  PF = 0.04 UNITLESS; PF is "partition coefficient fat/plasma";
  PK = 1.05 UNITLESS; PK is "partition coefficient kidney/plasma";
  PSk = 0.1 UNITLESS; PSk is "partition coefficient skin/plasma";
  PR = 0.12 UNITLESS; PR is "partition coefficient rest-of-body/plasma";
  PG = 0.05 UNITLESS; PG is "partition coefficient gut/plasma";
  PLun = 1.27 UNITLESS; PLun is "partition coefficient lung/plasma";
  kurine has PER_DAY; kurine is "urinary elimination rate constant";
  var Tm; Tm is "transporter maximum";
  SkinTarea has CentiM2; SkinTarea is "total area of the skin";
  FreeL has UNITLESS; FreeL is "free fraction of chemical in liver";
  FreeF has UNITLESS; FreeF is "free fraction of chemical in fat";
  FreeK has UNITLESS; FreeK is "free fraction of chemical in kidney";
  FreeSk has UNITLESS; FreeSk is "free fraction of chemical in skin";
  FreeR has UNITLESS; FreeR is "free fraction of chemical in rest of body";
  FreeG has UNITLESS; FreeG is "free fraction of chemical in gut";
  FreeLun has UNITLESS; FreeLun is "free fraction of chemical in lung";
  QC has L_PER_HR; QC is "cardiac output adjusted for body weight";
  QCP has L_PER_HR; QCP is "cardiac output adjusted for plasma flow";
  QL has L_PER_HR; QL is "scaled plasma flow to liver";
  QF has L_PER_HR; QF is "scaled plasma flow to fat";
  QK has L_PER_HR; QK is "scaled plasma flow to kidney";
  Qfil has L_PER_HR; Qfil is "plasma flow to filtrate compartment";
  QG has L_PER_HR; QG is "scaled plasma flow to gut";
  QSk has L_PER_HR; QSk is "scaled plasma flow to the skin";
  QR has L_PER_HR; QR is "plasma flow to the rest of the body";
  VL has L; VL is "liver volume";
  VF has L; VF is "fat volume";
  VK has L; VK is "kidney volume";
  Vfil has L; Vfil is "filtrate compartment volume";
  VG has L; VG is "gut volume";
  VPlas has L; VPlas is "plasma volume";
  VArt_Plas has L; VArt_Plas is "arterial blood plasma volume";
  VVen_Plas has L; VVen_Plas is "venous blood plasma volume";
  VSk has L; VSk is "skin volume";
  Vlun has L; Vlun is "lung volume";
  VR has L; VR is "rest-of-body volume";

  // Assignment rules:
  Lung := Vlun;
  Skin := VSk;
  Ven_Plas := VVen_Plas;
  Art_Plas := VArt_Plas;
  Gut := VG;
  Liv := VL;
  Fat := VF;
  Kid := VK;
  Fil := Vfil;
  Rest := VR;
  VvenC := 1 - VartC;
  kurine := kurinec*BW^(-0.25);
  Tm := Tmc*BW^0.75;
  SkinTarea := 9.1*(BW*1000)^0.666;
  FreeL := Free/PL;
  FreeF := Free/PF;
  FreeK := Free/PK;
  FreeSk := Free/PSk;
  FreeR := Free/PR;
  FreeG := Free/PG;
  FreeLun := Free/PLun;
  QC := QCC*BW^0.75;
  QCP := QC*(1 - Htc);
  QL := QLC*QCP;
  QF := QFC*QCP;
  QK := QKC*QCP;
  Qfil := 0.2*QK;
  QG := QGC*QCP;
  QSk := QSkC*QCP;
  QR := QCP - QL - QF - QK - QG - QSk;
  VL := VLC*BW;
  VF := VFC*BW;
  VK := VKC*BW;
  Vfil := VfilC*BW;
  VG := VGC*BW;
  VPlas := VPlasC*BW;
  VArt_Plas := VartC*VPlas;
  VVen_Plas := VvenC*VPlas;
  VSk := Skinarea*Skinthickness/1000;
  Vlun := VlunC*BW;
  VR := 0.84*BW - VL - VF - VK - Vfil - VG - VPlas - VSk - Vlun;

  // Reactions:
  _J0: Alung -> AArt_Plas; QCP*FreeLun*(Alung/Vlun);
  _J1: AArt_Plas -> AG; QG*Free*(AArt_Plas/VArt_Plas);
  _J2: AArt_Plas -> AL; QL*Free*(AArt_Plas/VArt_Plas);
  _J3: AArt_Plas -> AF; QF*Free*(AArt_Plas/VArt_Plas);
  _J4: AArt_Plas -> AK; QK*Free*(AArt_Plas/VArt_Plas);
  _J5: AArt_Plas -> Afil; Qfil*Free*(AArt_Plas/VArt_Plas);
  _J6: AArt_Plas -> AR; QR*Free*(AArt_Plas/VArt_Plas);
  _J7: AArt_Plas -> ASk; QSk*Free*(AArt_Plas/VArt_Plas);
  _J8: AG -> AL; QG*FreeG*(AG/VG);
  _J9: Afil -> AK; Tm*(Afil/Vfil)/(Kt + Afil/Vfil);
  _J10: Afil -> Adelay; Qfil*(Afil/Vfil);
  _J11: Adelay -> Aurine; kurine*Adelay;
  _J12: AL -> AVen_Plas; (QL + QG)*FreeL*(AL/VL);
  _J13: AF -> AVen_Plas; QF*FreeF*(AF/VF);
  _J14: AK -> AVen_Plas; QK*FreeK*(AK/VK);
  _J15: AR -> AVen_Plas; QR*FreeR*(AR/VR);
  _J16: ASk -> AVen_Plas; QSk*FreeSk*(ASk/VSk);
  _J17: AVen_Plas -> Alung; QCP*Free*(AVen_Plas/VVen_Plas);

  // Unit definitions:
  unit MicroGM = 1e-6 gram;
  unit DAY = 86400 second;
  unit L = litre;
  unit KiloGM = 1000 gram;
  unit L_PER_DAY_KiloGM3DIV4 = litre / (86400 second * (1000 gram)^0.75);
  unit UNITLESS = dimensionless;
  unit CentiM2 = (0.01 metre)^2;
  unit CentiM = 0.01 metre;
  unit GM_PER_MOL = gram / mole;
  unit PER_DAY = 1 / (86400 second);
  unit L_PER_HR = litre / (3600 second);
end
